#import "AnyTest_Templates.any"

#class_template ForcePlateType4AutoDetection (PlateName,
                                              Folder,
                                              AnyRefFrame &Limb1,
                                              AnyRefFrame &Limb2,
                                              No,VerticalDirection,
                                              HeightTolerance,
                                              VelThreshold,
                                              Fx, Fy, Fz,
                                              Mx,My,Mz,
                                              FootPresent){

  #var AnyFloat Cal = Folder.Groups.FORCE_PLATFORM.CAL_MATRIX.Data[No];
  #var AnySwitch Switch_DrawForceVectorFromCOP = On;
  #var AnyVar MaxLoad = max( vnorm({Fx,Fy,Fz}') );


  AnyIntVar Force_Plate_Type = Folder.Groups.FORCE_PLATFORM.TYPE.Data[No];
  ASSERT_EQ CorrectForcePlateType (
   val1 = .Force_Plate_Type,
   val2 = 4,
   Err = "Force-plate type appears to inconsistant with this force-plate template"
  ) = {};


  AnyFixedRefFrame Corners ={
    AnyVar CoordinateSystemSize= 0.1;

    AnyRefNode c01={
      AnyInt i=0;
      AnyInt plnr=No;
      sRel=Folder.PointsScaleFactor*{
          Folder.Groups.FORCE_PLATFORM.CORNERS.Data[plnr][i][0],
          Folder.Groups.FORCE_PLATFORM.CORNERS.Data[plnr][i][1],
          Folder.Groups.FORCE_PLATFORM.CORNERS.Data[plnr][i][2]
      };
      AnyDrawNode drw={ScaleXYZ=0.01*{1,1,1};RGB={1,0,0};};
      AnyDrawVector  DrawName = {
        Vec = {0.0,0,0};  //use zero length
        Line.Thickness = 0.025; //arbitary value
        Text = "1"; //make reference to name
        Line.RGB={1,0,0};//make reference to color
      };
    };

    AnyRefNode c02={
      AnyInt i=1;
      AnyInt plnr=No;
      sRel=Folder.PointsScaleFactor*{
          Folder.Groups.FORCE_PLATFORM.CORNERS.Data[plnr][i][0],
          Folder.Groups.FORCE_PLATFORM.CORNERS.Data[plnr][i][1],
          Folder.Groups.FORCE_PLATFORM.CORNERS.Data[plnr][i][2]
      };
      AnyDrawNode drw={ScaleXYZ=0.01*{1,1,1};RGB={1,0,0};};
      AnyDrawVector  DrawName = {
        Vec = {0.0,0,0};  //use zero length
        Line.Thickness = 0.025; //arbitary value
        Text = "2"; //make reference to name
        Line.RGB={1,0,0};//make reference to color
      };
    };

    AnyRefNode c03={
      AnyInt i=2;
      AnyInt plnr=No;
      sRel=Folder.PointsScaleFactor*{
          Folder.Groups.FORCE_PLATFORM.CORNERS.Data[plnr][i][0],
          Folder.Groups.FORCE_PLATFORM.CORNERS.Data[plnr][i][1],
          Folder.Groups.FORCE_PLATFORM.CORNERS.Data[plnr][i][2]
      };
      AnyDrawNode drw={ScaleXYZ=0.01*{1,1,1};RGB={1,0,0};};

      AnyDrawVector  DrawName = {
        Vec = {0.0,0,0};  //use zero length
        Line.Thickness = 0.025; //arbitary value
        Text = "3"; //make reference to name
        Line.RGB={1,0,0};//make reference to color
      };
    };

    AnyRefNode c04={
      AnyInt i=3;
      AnyInt plnr=No;
      sRel=Folder.PointsScaleFactor*{
          Folder.Groups.FORCE_PLATFORM.CORNERS.Data[plnr][i][0],
          Folder.Groups.FORCE_PLATFORM.CORNERS.Data[plnr][i][1],
          Folder.Groups.FORCE_PLATFORM.CORNERS.Data[plnr][i][2]
      };
      AnyDrawNode drw={ScaleXYZ=0.01*{1,1,1};RGB={1,0,0};};
      AnyDrawVector  DrawName = {
        Vec = {0.0,0,0};  //use zero length
        Line.Thickness = 0.025; //arbitary value
        Text = "4"; //make reference to name
        Line.RGB={1,0,0};//make reference to color
      };
    };

    AnyRefNode PlateCenter={
      sRel=0.25*(.c01.sRel+.c02.sRel+.c03.sRel+.c04.sRel);
      AnyVec3 p1=sRel;
      AnyVec3 p2=0.5*(.c01.sRel+.c04.sRel);
      AnyVec3 p3=0.5*(.c01.sRel+.c02.sRel);
      ARel =RotMat(p1,p2,p3);
      //      AnyDrawRefFrame drw={ScaleXYZ=..CoordinateSystemSize*{1,1,1};RGB={0,1,0};};
    };
  };


  AnySeg ForcePlate={
    Mass=0.0;
    Jii={0,0,0};
    r0=.Corners.PlateCenter.sRel;

    //Rotational tranformation matrix for a coordinate system defined by three points. The first point is the origin of the system; the second gives the direction of the first (x) axis. Together all three points must span a plane which will be the plane of the first (x) and the second (y) axes, having the third (z) axis as normal.
    AnyVec3 p1=.Corners.PlateCenter.sRel;
    AnyVec3 p2=0.5*(.Corners.c01.sRel+.Corners.c04.sRel);
    AnyVec3 p3=0.5*(.Corners.c01.sRel+.Corners.c02.sRel);
    Axes0 =RotMat(p1,p2,p3);

    AnyInt plnr=No;
    AnyFloat Origins= Folder.Groups.FORCE_PLATFORM.ORIGIN.Data;
    AnyVar z_check = iffun(gtfun(Origins[plnr][2], 0), 1, -1);
    AnyMessage Origin_Z_value_message=
    {
      TriggerConst = iffun(gteqfun(.z_check,0), 1, 0);
      Type = MSG_Message ;
      Message = "The Origin of this force plate is written as positive. So this value will be converted as negative automatically. Please refer to www.c3d.org/HTML/type41.htm ";
    };
    //Transducer location
    AnyRefNode TransducerLocation ={
      AnyFloat Origins= Folder.Groups.FORCE_PLATFORM.ORIGIN.Data;
      AnyVar xdist=.z_check*Origins[.plnr][0]*Folder.PointsScaleFactor;//distance from x axis on transducer to x axis of center of plate
      AnyVar ydist=.z_check*Origins[.plnr][1]*Folder.PointsScaleFactor; //distance from y axis on transducer to y axis of center of plate
      AnyVar zdist=.z_check*Origins[.plnr][2]*Folder.PointsScaleFactor;//distance from z axis on transducer to z surface of plate
      sRel={xdist,ydist,zdist};
      AnyDrawRefFrame drw={ScaleXYZ=0.4*{1,1,1};RGB={1,0,0};};
    };

    AnyRefNode PlateGraphics =
    {
      sRel={0,0,0.05};
      AnyVec3 Size={
          vnorm(..Corners.c01.sRel-..Corners.c02.sRel,2),
          vnorm(..Corners.c02.sRel-..Corners.c03.sRel,2),
          0.1
      };
      AnyDrawSurf DrwBox =
      {
        FileName = "box";
        AnyVar LoadRatio = ...OnOff*vnorm(...Force.Flocal) / (...MaxLoad+ 0.001)  ;
        RGB = 0.45*{1,1,1} ;
        ScaleXYZ=.Size/0.30;
        Opacity =0.20+ ...OnOff*(0.05+ 0.4* LoadRatio);
        Face=-1;
      };
    };
  };

  AnyKinEqSimpleDriver ForcePlateDriver ={
    AnyKinLinear ForcePlateLin={
      AnyRefNode &ref1=..Corners.PlateCenter;
      AnySeg &ref2=..ForcePlate;
      Ref=0;
    };

    AnyKinRotational ForcePlateRot={
      AnyRefNode &ref1=..Corners.PlateCenter;
      AnySeg &ref2=..ForcePlate;
      Type=RotAxesAngles;
    };
    DriverPos={0,0,0,0,0,0};
    DriverVel={0,0,0,0,0,0};
    Reaction.Type = {Off,Off,Off,Off,Off,Off};
  };

  AnyFloatVar tStart = Folder.Header.FirstFrameNo/Folder.Header.VideoFrameRate;
  AnyFloatVar tEnd =  (Folder.Header.LastFrameNo+1)/Folder.Header.VideoFrameRate;
  AnyInt NoAnalogData= (Folder.Header.LastFrameNo - Folder.Header.FirstFrameNo +1)*Folder.Header.NoAnalogSamplesPer3DFrame;
  AnyFloat Time= farr( tStart, (tEnd-tStart)/( NoAnalogData - 1) ,  NoAnalogData);


  AnyFunInterpol load ={
    Type=PiecewiseLinear;
    T=.Time;
    Data=.Cal'*{Fx,Fy,Fz,Mx,My,Mz};
  };

  AnyVar FzTotal=load(ForcePlateDriver.t)[2];
  AnyVar OnOff=iffun(gtfun(-FzTotal,10.0),1.0,0.0);

  AnyForce3D Force ={

    AnyRefFrame  &ref=.ForcePlate.TransducerLocation ;
    Flocal=.OnOff*{.load(.ForcePlateDriver.t)[0],.load(.ForcePlateDriver.t)[1],.load(.ForcePlateDriver.t)[2]};
    AnyDrawVector DrawForce =
    {
      AnyRefFrame &ref=.ref;
      Vec=.Flocal*1/1000;
      PointAway = Off;
      DrawCoord = Off;

      Line.RGB ={0,0,1};
      Line.Thickness = 0.01;
      Line.End.Thickness = 2*0.01;
      Line.End.Length = 4*0.01;
      GlobalCoord=Off;
    };
  };

  AnyMoment3D Moment =
  {
    AnyRefFrame  &ref=.ForcePlate.TransducerLocation ;
    Mlocal=.OnOff*{.load(.ForcePlateDriver.t)[3],.load(.ForcePlateDriver.t)[4],.load(.ForcePlateDriver.t)[5]}*Folder.PointsScaleFactor;
    AnyDrawVector DrawMoment =
    {
      AnyRefFrame &ref=.ref;
      Vec=.Mlocal*1/1000;
      PointAway = Off;
      DrawCoord = Off;
      Line.RGB ={0,1,1};
      Line.Thickness = 0.01;
      Line.End.Thickness = 2*0.01;
      Line.End.Length = 4*0.01;
      GlobalCoord=Off;
    };
  };

  AnyFolder CenterOfPressure =
  {
     AnyForceMomentMeasure2 NetEffectMeasure =
     {
         AnyRefFrame& ref = ..ForcePlate;
         AnyForceBase& Forces = ..Force;
         AnyForceBase& Moments = ..Moment;

         AnyVec3 Flocal = F*ref.Axes;
         AnyVec3 Mlocal = M*ref.Axes;
     };

     AnyVar fx = NetEffectMeasure.Flocal[0];
     AnyVar fy = NetEffectMeasure.Flocal[1];
     AnyVar fz = NetEffectMeasure.Flocal[2];
     AnyVar mx = NetEffectMeasure.Mlocal[0];
     AnyVar my = NetEffectMeasure.Mlocal[1];
     AnyVar mz = NetEffectMeasure.Mlocal[2];

     AnyVar fzz =iffun(gtfun(  (fz^2)^0.5,0),fz,fz+1000000);

     AnyVar Vx= -my/fzz;
     AnyVar Vy= mx/fzz;
     AnyVar Vz= 0;

     AnyVar OnOff=.OnOff;

     AnyRefFrame& ref_ForcePlate = .ForcePlate;
     ref_ForcePlate  =
     {
        AnyDrawSphere COP_ball =
        {
            RGB = {0,1,0};
            ScaleXYZ = 0.015 *{1,1,1};
            //Opacity = iffun(gtfun(..fz, -10.0), 0.0, 1.0);
            Opacity = ..OnOff;
            Position = {..Vx, ..Vy, ..Vz};
        };
     };

     AnyDrawLine Line =
     {
       p0 = {.Vx, .Vy, .Vz};
       p1 = p0+0.004*.OnOff*{.fx, .fy, .fz};
       Visible = ..Switch_DrawForceVectorFromCOP ;
       AnyRefFrame &ref = ..ForcePlate;

       Line.RGB ={0,0,1};
       Line.Thickness = 0.01;
       Line.End.Thickness = 2*0.01;
       Line.End.Length = 4*0.01;
       GlobalCoord=Off;
     };

  };

  #if VerticalDirection=="X"
  AnyIntArray Index={1,2,0};
  #endif

  #if VerticalDirection=="Y"
  AnyIntArray Index={0,2,1};
  #endif

  #if VerticalDirection=="Z"
  AnyIntArray Index={0,1,2};
  #endif

  AnyFolder ContactDetectionLimb1 ={
    AnyVec3 P1= .Limb1.HeelContactNodeLow.r;
    AnyVar P1Vel= vnorm(.Limb1.HeelContactNodeLow.rDot,2);

    AnyVec3 P2= .Limb1.ToeLateralContactNode.r;
    AnyVar P2Vel= vnorm(.Limb1.HeelContactNodeLow.rDot,2);

    #include "<ANYBODY_PATH_TOOLBOX>/Mocap/ContactDetection.any"

    AnyMuscleModelUsr1 InContactMuscle = {
      F0 = 0;
      S = .NodeWithInBox.WithinBoxAndVelBelowThreshold *10000;
    };

    AnyMuscleModelUsr1 NoContactMuscle = {
      AnyVar Limb2Contact=iffun(eqfun(..ContactDetectionLimb2.NodeWithInBox.WithinBoxAndVelBelowThreshold ,1.0),0.0,1.0); //equal 0 if limb2 in contact
      S =Limb2Contact*.NodeWithInBox.OutsideBoxOrVelHigherThanThreshold*10000;
      F0 = 0;
    };

    #if FootPresent

    AnyFolder PlateFootReactions = {
      AnySeg &ref1=..ForcePlate;
      AnySeg &ref2=..Limb1;
      AnyMuscleModel &MusMdl=.InContactMuscle;
      #include "<ANYBODY_PATH_TOOLBOX>/Mocap/ArtificialMuscleConnection.any"
    };
    #endif

    AnyFolder PlateGroundReactions={
      AnyRefFrame &ref1=..Corners.PlateCenter;
      AnySeg &ref2=..ForcePlate;
      AnyMuscleModel &MusMdl=.NoContactMuscle;
      #include "<ANYBODY_PATH_TOOLBOX>/Mocap/ArtificialMuscleConnection.any"
    };
  };

  AnyFolder ContactDetectionLimb2 = {
    AnyVec3 P1= .Limb2.HeelContactNodeLow.r;
    AnyVar P1Vel= vnorm(.Limb2.HeelContactNodeLow.rDot,2);

    AnyVec3 P2= .Limb2.ToeLateralContactNode.r;
    AnyVar P2Vel= vnorm(.Limb2.HeelContactNodeLow.rDot,2);

    #include "<ANYBODY_PATH_TOOLBOX>/Mocap/ContactDetection.any"

    AnyMuscleModelUsr1 InContactMuscle = {
      F0 = 0;
      S = .NodeWithInBox.WithinBoxAndVelBelowThreshold *10000;
    };

    AnyMuscleModelUsr1 NoContactMuscle = {
      AnyVar Limb1Contact=iffun(eqfun(..ContactDetectionLimb1.NodeWithInBox.WithinBoxAndVelBelowThreshold ,1.0),0.0,1.0); //equal 0 if limb1 in contact
      S =Limb1Contact*.NodeWithInBox.OutsideBoxOrVelHigherThanThreshold*10000;
      F0 = 0;
    };

    #if FootPresent

    AnyFolder PlateFootReactions={
      AnySeg &ref1=..ForcePlate;
      AnySeg &ref2=..Limb2;
      AnyMuscleModel &MusMdl=.InContactMuscle;
      #include "<ANYBODY_PATH_TOOLBOX>/Mocap/ArtificialMuscleConnection.any"
    };

    #endif

    AnyFolder PlateGroundReactions={
      AnyRefFrame &ref1=..Corners.PlateCenter;
      AnySeg &ref2=..ForcePlate;
      AnyMuscleModel &MusMdl=.NoContactMuscle;
      #include "<ANYBODY_PATH_TOOLBOX>/Mocap/ArtificialMuscleConnection.any"
    };
  };
};
