AnyFolder JointsAndDrivers = {
#ifndef FORCE_MODEL_LOAD_WHEN_DATA_FILES_ARE_MISSING
  // Macro for initializing a empty mxn matrix
  #define _ZEROS(m,n) 0.0*farr( 0.0, 1.0, m)'*{farr( 0.0, 1.0, n)}
  AnyKinDriver JntDriverTrunk = {
    AnyFunInterpol InterpolatedData = {
      AnyInputFile FileReader = {
          FileName = TEMP_PATH + "/" + MOCAP_JOINT_ANGLE_FILE_PREFIX + MOCAP_OUTPUT_FILENAME_PREFIX + Main.ModelSetup.TrialSpecificData.TrialFileName + "-euler-trunk.txt";
          FileErrorContinueOnOff = On;
          #if ANYBODY_V1 >= 6 & ANYBODY_V2 >= 1
          ReloadOnOff = On;
          TOnOff = DesignVar(On);
          // Get the rotation angles fromt the initial pelvis rotation matrix.
          // This allows us to specify a default driver which is close to the
          // load time position.
          RotAxisAnglesZYX InitPelvis(ROT = Main.ModelSetup.TrialSpecificData.InitialPositionOfBody.PelvisRotationMatrix) = { };
          AnyInt Length0 = Main.Studies.KinematicStudy.nStep;
          T0 = Main.Studies.KinematicStudy.tArray;
          Data0 =
          {
            Main.ModelSetup.TrialSpecificData.InitialPositionOfBody.PelvisPos[0],
            Main.ModelSetup.TrialSpecificData.InitialPositionOfBody.PelvisPos[1],
            Main.ModelSetup.TrialSpecificData.InitialPositionOfBody.PelvisPos[2],
            InitPelvis.xRot, InitPelvis.yRot, InitPelvis.zRot,
            0,0,0,0,0,0
          }'* (1+_ZEROS(1,Length0));
          #endif

      };

      AnyMessage AnyMocap =
      {
        AnyVar maxtime =  .FileReader.T[max({0,.FileReader.nDataInFile-1})];
        TriggerPreProcess = Off;
        TriggerConst = Off;
        TriggerRuntime = gtfun(.....t,  maxtime );
        Type = MSG_Error;
        Message = DesignVar("No kinematic joint angle data available after t = "+strval(maxtime,  "%.3g") + "s. " +
        "Please re-run the complete kinematic analysis to recompute all joint angles and data.");
      };
//


      Type  = iffun(gtfun(FileReader.Length0, 1), round(Obj2Num(&Bspline)) , round(Obj2Num(&ConstantValue)));
      BsplineOrder = 4;
      Data = FileReader.Data+0*FileReader.nUpdData;
      T = FileReader.T+0*FileReader.nUpdData;
    };
    AnyKinMeasureOrg &PelvisPosX = ...BodyModel.Interface.Trunk.PelvisPosX;
    AnyKinMeasureOrg &PelvisPosY = ...BodyModel.Interface.Trunk.PelvisPosY;
    AnyKinMeasureOrg &PelvisPosZ = ...BodyModel.Interface.Trunk.PelvisPosZ;
    AnyKinMeasureOrg &PelvisRotX = ...BodyModel.Interface.Trunk.PelvisRotX;
    AnyKinMeasureOrg &PelvisRotY = ...BodyModel.Interface.Trunk.PelvisRotY;
    AnyKinMeasureOrg &PelvisRotZ = ...BodyModel.Interface.Trunk.PelvisRotZ;
    AnyKinMeasureOrg &PelvisThoraxExtension = ...BodyModel.Interface.Trunk.PelvisThoraxExtension;
    AnyKinMeasureOrg &PelvisThoraxLateralBending = ...BodyModel.Interface.Trunk.PelvisThoraxLateralBending;
    AnyKinMeasureOrg &PelvisThoraxRotation = ...BodyModel.Interface.Trunk.PelvisThoraxRotation;
    AnyKinMeasureOrg& SkullThoraxFlexion = ...BodyModel.Interface.Trunk.SkullThoraxFlexion;
    AnyKinMeasureOrg& SkullThoraxLateralBending = ...BodyModel.Interface.Trunk.SkullThoraxLateralBending;
    AnyKinMeasureOrg& SkullThoraxRotation = ...BodyModel.Interface.Trunk.SkullThoraxRotation;
    Reaction.Type={On,On,On,On,On,On,Off,Off,Off,Off,Off,Off};
  };

  #if BM_LEG_LEFT == CONST_LEG_MODEL_TLEM
  AnyKinDriver JntDriverLeftLegTD = {
    AnyFunInterpol InterpolatedData = {
      AnyInputFile FileReader = {
          FileName = TEMP_PATH + "/" + MOCAP_JOINT_ANGLE_FILE_PREFIX +MOCAP_OUTPUT_FILENAME_PREFIX + Main.ModelSetup.TrialSpecificData.TrialFileName + "-euler-leftlegtd.txt";
          FileErrorContinueOnOff = On;
          #if ANYBODY_V1 >= 6 & ANYBODY_V2 >= 1
          ReloadOnOff = On;
          AnyInt Length0 = Main.Studies.KinematicStudy.nStep;
          T0 = Main.Studies.KinematicStudy.tArray;
           Data0 =  _ZEROS(..nDim, Length0 );
          #endif
      };
      Type  = iffun(gtfun(FileReader.Length0, 1), round(Obj2Num(&Bspline)) , round(Obj2Num(&ConstantValue)));
      BsplineOrder = 4;
      Data = FileReader.Data+0*FileReader.nUpdData;
      T = FileReader.T+0*FileReader.nUpdData;
    };
    AnyKinMeasureOrg &HipFlexion = ...BodyModel.Interface.Left.HipFlexion;
    AnyKinMeasureOrg &HipAbduction = ...BodyModel.Interface.Left.HipAbduction;
    AnyKinMeasureOrg &HipExternalRotation = ...BodyModel.Interface.Left.HipExternalRotation;
    AnyKinMeasureOrg &KneeFlexion = ...BodyModel.Interface.Left.KneeFlexion;
    AnyKinMeasureOrg &AnklePlantarFlexion = ...BodyModel.Interface.Left.AnklePlantarFlexion;
    AnyKinMeasureOrg &SubTalarEversion = ...BodyModel.Interface.Left.SubTalarEversion;
    Reaction.Type={Off,Off,Off,Off,Off,Off};
  };
  #endif


  #if BM_LEG_RIGHT == CONST_LEG_MODEL_TLEM
  AnyKinDriver JntDriverRightLegTD = {
    AnyFunInterpol InterpolatedData = {
      AnyInputFile FileReader = {
          FileName = TEMP_PATH + "/" + MOCAP_JOINT_ANGLE_FILE_PREFIX +  MOCAP_OUTPUT_FILENAME_PREFIX + Main.ModelSetup.TrialSpecificData.TrialFileName + "-euler-rightlegtd.txt";
          FileErrorContinueOnOff = On;
          #if ANYBODY_V1 >= 6 & ANYBODY_V2 >= 1
          ReloadOnOff = On;
          AnyInt Length0 = Main.Studies.KinematicStudy.nStep;
          T0 = Main.Studies.KinematicStudy.tArray;
           Data0 =  _ZEROS(..nDim, Length0 );
          #endif
      };
      Type  = iffun(gtfun(FileReader.Length0, 1), round(Obj2Num(&Bspline)) , round(Obj2Num(&ConstantValue)));
      BsplineOrder = 4;
      Data = FileReader.Data+0*FileReader.nUpdData;
      T = FileReader.T+0*FileReader.nUpdData;
    };
    AnyKinMeasureOrg &HipFlexion = ...BodyModel.Interface.Right.HipFlexion;
    AnyKinMeasureOrg &HipAbduction = ...BodyModel.Interface.Right.HipAbduction;
    AnyKinMeasureOrg &HipExternalRotation = ...BodyModel.Interface.Right.HipExternalRotation;
    AnyKinMeasureOrg &KneeFlexion = ...BodyModel.Interface.Right.KneeFlexion;
    AnyKinMeasureOrg &AnklePlantarFlexion = ...BodyModel.Interface.Right.AnklePlantarFlexion;
    AnyKinMeasureOrg &SubTalarEversion = ...BodyModel.Interface.Right.SubTalarEversion;
    Reaction.Type={Off,Off,Off,Off,Off,Off};
  };
  #endif


  #if BM_LEG_LEFT == CONST_LEG_MODEL_Leg
  AnyKinDriver JntDriverLeftLeg = {
    AnyFunInterpol InterpolatedData = {
      AnyInputFile FileReader = {
          FileName = TEMP_PATH + "/" + MOCAP_JOINT_ANGLE_FILE_PREFIX + MOCAP_OUTPUT_FILENAME_PREFIX + Main.ModelSetup.TrialSpecificData.TrialFileName + "-euler-leftleg.txt";
          FileErrorContinueOnOff = On;
          #if ANYBODY_V1 >= 6 & ANYBODY_V2 >= 1
          ReloadOnOff = On;
          AnyInt Length0 = Main.Studies.KinematicStudy.nStep;
          T0 = Main.Studies.KinematicStudy.tArray;
           Data0 =  _ZEROS(..nDim, Length0);
          #endif
      };
      Type  = iffun(gtfun(FileReader.Length0, 1), round(Obj2Num(&Bspline)) , round(Obj2Num(&ConstantValue)));
      BsplineOrder = 4;
      Data = FileReader.Data+0*FileReader.nUpdData;
      T = FileReader.T+0*FileReader.nUpdData;
    };
    AnyKinMeasureOrg &HipFlexion = ...BodyModel.Interface.Left.HipFlexion;
    AnyKinMeasureOrg &HipAbduction = ...BodyModel.Interface.Left.HipAbduction;
    AnyKinMeasureOrg &HipExternalRotation = ...BodyModel.Interface.Left.HipExternalRotation;
    AnyKinMeasureOrg &KneeFlexion = ...BodyModel.Interface.Left.KneeFlexion;
    AnyKinMeasureOrg &AnklePlantarFlexion = ...BodyModel.Interface.Left.AnklePlantarFlexion;
    AnyKinMeasureOrg &AnkleEversion = ...BodyModel.Interface.Left.AnkleEversion;
    Reaction.Type={Off,Off,Off,Off,Off,Off};
  };
  #endif


  #if BM_LEG_RIGHT== CONST_LEG_MODEL_Leg
  AnyKinDriver JntDriverRightLeg = {
    AnyFunInterpol InterpolatedData = {
      AnyInputFile FileReader = {
          FileName = TEMP_PATH + "/" + MOCAP_JOINT_ANGLE_FILE_PREFIX + MOCAP_OUTPUT_FILENAME_PREFIX + Main.ModelSetup.TrialSpecificData.TrialFileName + "-euler-rightleg.txt";
          FileErrorContinueOnOff = On;
          #if ANYBODY_V1 >= 6 & ANYBODY_V2 >= 1
          ReloadOnOff = On;
          AnyInt Length0 = Main.Studies.KinematicStudy.nStep;
          T0 = Main.Studies.KinematicStudy.tArray;
           Data0 =  _ZEROS(..nDim, Length0);
          #endif
      };
      Type  = iffun(gtfun(FileReader.Length0, 1), round(Obj2Num(&Bspline)) , round(Obj2Num(&ConstantValue)));
      BsplineOrder = 4;
      Data = FileReader.Data+0*FileReader.nUpdData;
      T = FileReader.T+0*FileReader.nUpdData;
    };
    AnyKinMeasureOrg &HipFlexion = ...BodyModel.Interface.Right.HipFlexion;
    AnyKinMeasureOrg &HipAbduction = ...BodyModel.Interface.Right.HipAbduction;
    AnyKinMeasureOrg &HipExternalRotation = ...BodyModel.Interface.Right.HipExternalRotation;
    AnyKinMeasureOrg &KneeFlexion = ...BodyModel.Interface.Right.KneeFlexion;
    AnyKinMeasureOrg &AnklePlantarFlexion = ...BodyModel.Interface.Right.AnklePlantarFlexion;
    AnyKinMeasureOrg &AnkleEversion = ...BodyModel.Interface.Right.AnkleEversion;
    Reaction.Type={Off,Off,Off,Off,Off,Off};
  };
  #endif


  #if BM_ARM_LEFT == ON
  AnyKinDriver JntDriverLeftArm = {
    AnyFunInterpol InterpolatedData = {
      AnyInputFile FileReader = {
          FileName = TEMP_PATH + "/" + MOCAP_JOINT_ANGLE_FILE_PREFIX + MOCAP_OUTPUT_FILENAME_PREFIX + Main.ModelSetup.TrialSpecificData.TrialFileName + "-euler-leftarm.txt";
          FileErrorContinueOnOff = On;
          #if ANYBODY_V1 >= 6 & ANYBODY_V2 >= 1
          ReloadOnOff = On;
          AnyInt Length0 = Main.Studies.KinematicStudy.nStep;
          T0 = Main.Studies.KinematicStudy.tArray;
          //T0 = arrcat( arrcat( {min(.....tArray)-1} , .....tArray), {max(.....tArray)+1} );
           Data0 =  _ZEROS(..nDim, Length0);
          #endif
      };
      Type  = iffun(gtfun(FileReader.Length0, 1), round(Obj2Num(&Bspline)) , round(Obj2Num(&ConstantValue)));
      BsplineOrder = 4;
      Data = FileReader.Data+0*FileReader.nUpdData;
      T = FileReader.T+0*FileReader.nUpdData;
    };
    AnyKinMeasureOrg &SternoClavicularProtraction=...BodyModel.Interface.Left.SternoClavicularProtraction;
    AnyKinMeasureOrg &SternoClavicularElevation=...BodyModel.Interface.Left.SternoClavicularElevation;
    AnyKinMeasureOrg &SternoClavicularAxialRotation=...BodyModel.Interface.Left.SternoClavicularAxialRotation;
    AnyKinMeasureOrg &GlenohumeralFlexion = ...BodyModel.Interface.Left.GlenohumeralFlexion;
    AnyKinMeasureOrg &GlenohumeralExternalRotation = ...BodyModel.Interface.Left.GlenohumeralExternalRotation;
    AnyKinMeasureOrg &GlenohumeralAbduction = ...BodyModel.Interface.Left.GlenohumeralAbduction;
    AnyKinMeasureOrg &ElbowFlexion = ...BodyModel.Interface.Left.ElbowFlexion;
    AnyKinMeasureOrg &ElbowPronation = ...BodyModel.Interface.Left.ElbowPronation;
    AnyKinMeasureOrg &WristFlexion = ...BodyModel.Interface.Left.WristFlexion;
    AnyKinMeasureOrg &WristAbduction = ...BodyModel.Interface.Left.WristAbduction;
    Reaction.Type={Off,Off,Off,Off,Off,Off,Off,Off,Off,Off};
  };
  #endif


  #if BM_ARM_RIGHT == ON
  AnyKinDriver JntDriverRightArm = {
    AnyFunInterpol InterpolatedData = {
      AnyInputFile FileReader = {
          FileName = TEMP_PATH + "/" + MOCAP_JOINT_ANGLE_FILE_PREFIX + MOCAP_OUTPUT_FILENAME_PREFIX + Main.ModelSetup.TrialSpecificData.TrialFileName + "-euler-rightarm.txt";
          FileErrorContinueOnOff = On;
          #if ANYBODY_V1 >= 6 & ANYBODY_V2 >= 1
          ReloadOnOff = On;
          AnyInt Length0 = Main.Studies.KinematicStudy.nStep;
          T0 = Main.Studies.KinematicStudy.tArray;
          //T0 = arrcat( arrcat( {min(.....tArray)-1} , .....tArray), {max(.....tArray)+1} );
           Data0 =  _ZEROS(..nDim, Length0 );
          #endif
      };
      Type  = iffun(gtfun(FileReader.Length0, 1), round(Obj2Num(&Bspline)) , round(Obj2Num(&ConstantValue)));
      BsplineOrder = 4;
      Data = FileReader.Data+0*FileReader.nUpdData;
      T = FileReader.T+0*FileReader.nUpdData;
    };
    AnyKinMeasureOrg &SternoClavicularProtraction=...BodyModel.Interface.Right.SternoClavicularProtraction;
    AnyKinMeasureOrg &SternoClavicularElevation=...BodyModel.Interface.Right.SternoClavicularElevation;
    AnyKinMeasureOrg &SternoClavicularAxialRotation=...BodyModel.Interface.Right.SternoClavicularAxialRotation;

    AnyKinMeasureOrg &GlenohumeralFlexion = ...BodyModel.Interface.Right.GlenohumeralFlexion;
    AnyKinMeasureOrg &GlenohumeralExternalRotation = ...BodyModel.Interface.Right.GlenohumeralExternalRotation;
    AnyKinMeasureOrg &GlenohumeralAbduction = ...BodyModel.Interface.Right.GlenohumeralAbduction;
    AnyKinMeasureOrg &ElbowFlexion = ...BodyModel.Interface.Right.ElbowFlexion;
    AnyKinMeasureOrg &ElbowPronation = ...BodyModel.Interface.Right.ElbowPronation;
    AnyKinMeasureOrg &WristFlexion = ...BodyModel.Interface.Right.WristFlexion;
    AnyKinMeasureOrg &WristAbduction = ...BodyModel.Interface.Right.WristAbduction;
    Reaction.Type={Off,Off,Off,Off,Off,Off,Off,Off,Off,Off};
  };
  #endif

 #endif
};
